# encoding: utf-8
#!/usr/bin/python3

import os
from stlib3.scene import Scene
import numpy as np
import timeit
from splib.animation import AnimationManager, addAnimation


class SceneDefinition:
    """This class handles the scene creation of the robot model"""
    def __init__(self, rootNode, design=np.zeros([1,1,1]), meshFolder="",
                 poissonRatio=0.3, youngModulus= 18000, totalMass = 1.0,
                 dt=0.001, with_gui=False, debug=False, collision=False, constraint=""):
        """initialize the class"""
        properties = [
            {'name': 'rootNode', 'type': 'sofa node', 'help': 'root node', 'default': ''},
            {'name': 'meshFolder', 'type': 'string', 'help': 'Path to volume mesh and cavity files', 'default': ''},
            {'name': 'design', 'type': 'ndarray', 'help': 'numpy array specifying design, coords -1 solid, 0 cavity', 'default': 'np.zeros([1,1,1])'},
            {'name': 'dt', 'type': 'double', 'help': 'time step', 'default': 0.001},
            {'name': 'poissonRatio', 'type': 'double', 'help': 'Poisson ratio', 'default': 0.3},
            {'name': 'youngModulus', 'type': 'double', 'help': "Young's modulus", 'default': 18000.0},
            {'name': 'totalMass', 'type': 'double', 'help': 'Total mass', 'default': 1.0}]

        # design as described in the sim wrapper
        self.design = design
        self.rootNode = rootNode
        self.meshFolder = meshFolder
        self.poissonRatio = poissonRatio
        self.youngModulus = youngModulus
        self.totalMass = totalMass
        self.with_gui = with_gui
        self.debug = debug
        self.with_collision = collision


        # this is the position and orientation of the robot. It is not fully
        # implemented so I think it is bedst to leave it as is.
        self.rotation = [0.0, 0.0, 0.0]
        self.translation = [0.0, 0.0, 0.0]

        # this will be the base of the robot in the scene graph
        self.volume = None

        # these two lines replace:
        # from stlib3.scene import Scene
        # Scene(self.rootNode, gravity=[0, 0.0, 0], dt=dt)
        # to remove the dependency
        self.rootNode.findData('gravity').value = [0.0, 0, -9.8*10**4]
        self.rootNode.dt.value = dt

        required_plugins = ['SofaTopologyMapping', 'SofaOpenglVisual', 'SofaSparseSolver', 'SofaConstraint',
                            'SofaGeneralLoader', 'SoftRobots', 'SofaBoundaryCondition', 'SofaMiscCollision']
        for i in required_plugins:
            self.rootNode.addObject("RequiredPlugin", name='req_p' + i, pluginName=i)

        # create all the material and cavities
        #self.place_materials_and_cavities_and_solvers() #testing MOR
        self.mor_test()

        # fix the base (all nodes where z=0)
        if "set_z" in constraint:
            self.fix_z()
        if "floor" in constraint:
            self.add_floor()

    def add_floor(self):
        #Creating the floor

        planeNode = self.rootNode.addChild('Plane')
        planeNode.addObject('MeshObjLoader', name='loader', filename="mesh/floorFlat.obj", triangulate="true")
        planeNode.addObject('Mesh', src="@loader")
        planeNode.addObject('MechanicalObject', src="@loader", rotation="90 0 0", translation="0 35 -1", scale="15")
        planeNode.addObject('TriangleCollisionModel', moving=False, simulated=False, group="1")
        planeNode.addObject('LineCollisionModel', moving=False, simulated=False, group="1")
        planeNode.addObject('PointCollisionModel', moving=False, simulated=False, group="1")
        if self.with_gui:
            planeNode.addObject('OglModel', name="Visual", src="@loader", color="1 0 0 1",
                                   rotation="90 0 0", translation="0 35 -1", scale="15")

    def fix_z(self):
        '''Fix all vertexes in mesh where z=0, this is so that one the robot doesn't
        fly off to infinity if it gets pushed a little bit, and two so it has something
        to push against while for now: it does simple shape rewards'''
        vertexes = self.rootNode.volume.loader.position.array()
        fix_string = " "
        for i, pos in enumerate(vertexes):
            if -0.01 <= pos[2] <= 0.01:
                # print(i,pos)

                fix_string = fix_string + " " + str(i)
        # print("FIXED POINTS", fix_string)
        # this adds a constraint that fixes these vertexes
        self.volume.addObject("FixedConstraint", drawSize=1.0, indices=fix_string)

    def mor_test(self):
        from sparse_mor_output.reduced_test import Reduced_test
        Reduced_test(self.rootNode)

    def place_materials_and_cavities_and_solvers(self):
        """Place solid elastic material and cavities"""
        # linear solver (with parameters from example file)
        self.rootNode.addObject('GenericConstraintSolver', name='gencs', maxIterations='500', printLog='0',
                                tolerance='0.0000001')


        # Load solvers and animation loop
        # These determine how the simulation moves from one step to the next.
        # the EulerImplicitSolver (I believe) sets up the equations and the
        # SparseLDLSolver is what actually solves them
        # FreeMotionAnimationLoop enables legrangian methods for constraints
        self.rootNode.addObject('FreeMotionAnimationLoop')


        #trail

        self.rootNode.addObject('GenericConstraintSolver', printLog='0', tolerance="1e-15", maxIterations="5000")
        self.rootNode.addObject('DefaultPipeline', name='collisionPipeline', verbose="0")
        self.rootNode.addObject('BruteForceDetection', name="N2")
        self.rootNode.addObject('RuleBasedContactManager', name="Response", response="FrictionContact",
                              rules="0 * FrictionContact?mu=0.5")
        self.rootNode.addObject('DefaultContactManager', response="FrictionContact", responseParams="mu=0.7")
        self.rootNode.addObject('LocalMinDistance', name="Proximity", alarmDistance="2.5", contactDistance="0.5",
                              angleCone="0.01")


        # specify solid mechanics
        # self.volume is the elastic material


        self.volume = self.rootNode.addChild('volume')
        self.volume.addObject('EulerImplicitSolver', name='integration')
        self.volume.addObject('SparseLDLSolver', name="solver")

        self.volume.addObject('MeshGmshLoader', name='loader', filename=self.meshFolder + "volume.msh",
                              rotation=self.rotation, translation=self.translation, scale3d=[1.0, 1.0, 1.0])

        self.volume.addObject('TetrahedronSetTopologyContainer', src="@loader", name="container")
        self.volume.addObject('MechanicalObject', template='Vec3d', name='dofs')
        self.volume.addObject('UniformMass', totalMass=self.totalMass, name='mass')
        # if we wanted to do a Neo-Hookean Solid we would do that at this line.
        self.volume.addObject('TetrahedronFEMForceField', template='Vec3d', method='large', name='forcefield',
                                 poissonRatio=self.poissonRatio, youngModulus=self.youngModulus)
        # Constraint solver for corrections, this is how forces between the
        # pressurized cavities are applied to the solid
        #self.volume.addObject('LinearSolverConstraintCorrection', template='Vec3d', solverName='solver')
        self.volume.addObject('GenericConstraintCorrection', solverName='solver')
        # add the cavities
        for ijk in np.ndindex(self.design.shape):
            # if this section is marked as a cavity, create one with the correct index
            if self.design[ijk] == 0:
                i, j, k = ijk
                cavity = self.volume.addChild(f'cavity_{i}_{j}_{k}')

                # load the specific file, it should be at the correct coordinates and match with a corrisponding
                # one in the volume
                cavity.addObject('MeshSTLLoader', name='loader',
                                 filename=self.meshFolder + f'cavity_{i}_{j}_{k}.stl',
                                 translation=self.translation, rotation=self.rotation)
                cavity.addObject('Mesh', src='@loader', name='topo')
                cavity.addObject('MechanicalObject', name='cavity')
                # this pressure constraint is how the cavity is actually controlled
                cavity.addObject('SurfacePressureConstraint',
                                 name="SurfacePressureConstraint",
                                 template='Vec3d', value="2000.000",
                                 triangles='@topo.triangles', drawPressure='0',
                                 drawScale='0.02', valueType="volumeGrowth")
                cavity.addObject('BarycentricMapping', name='mapping',
                                 mapForces='false', mapMasses='false')

        if self.with_gui:
            # add visualization for when it is running in a gui.
            # trial

            self.rootNode.addObject('VisualStyle',
                                    displayFlags='showBehaviorModels')
            modelVisu = self.volume.addChild('visu')
            modelVisu.addObject('MeshSTLLoader', name='loader', filename=self.meshFolder + "volume_collision.stl")

            modelVisu.addObject('OglModel',
                                   src='@loader',
                                   template='ExtVec3f',
                                   color='0.7 0.7 0.7 0.6')

            modelVisu.addObject('BarycentricMapping')

            robotVisu = self.volume.addChild('robotvisu')
            robotVisu.addObject('TriangleSetTopologyContainer', name='container')
            robotVisu.addObject('TriangleSetTopologyModifier')

            robotVisu.addObject('TriangleSetGeometryAlgorithms', template='Vec3d')
            robotVisu.addObject('Tetra2TriangleTopologicalMapping', name='Mapping', input="@../container",
                                output="@container")
            robotVisu.addObject('OglModel', template='Vec3d', color='0.3 0.2 0.2 0.6', translation=self.translation)
            robotVisu.addObject('IdentityMapping')

            self.rootNode.addObject('BackgroundSetting', color='0 0.168627 0.211765')

        if self.with_collision:
            volume_collision = self.volume.addChild('volume_collision')
            volume_collision.addObject('MeshSTLLoader', name='loader', filename=self.meshFolder+"volume_collision.stl", triangulate="true")
            volume_collision.addObject('TriangleSetTopologyContainer', src='@loader', name='container')
            volume_collision.addObject('MechanicalObject', name='collisiondof', template='Vec3d')
            volume_collision.addObject('TriangleCollisionModel',group="0")
            volume_collision.addObject('LineCollisionModel', group="0")
            volume_collision.addObject('PointCollisionModel',group="0")
            #planeNode.createObject('Triangle', group="1")
            #planeNode.createObject('Line', group="1")
            #planeNode.createObject('Point', group="1")
            volume_collision.addObject('BarycentricMapping')


        if self.with_collision:
            print("BAD CODE")
            # Sub topology this adds "the piece of paper layer"
            self.volume.addObject('BoxROI', name='boxROISubTopo', box='0 0 0 150 -100 1', drawBoxes='true')
            self.volume.addObject('BoxROI', name='membraneROISubTopo', box='0 0 -0.1 150 -100 0.1',
                               computeTetrahedra="false", drawBoxes='true')

            modelSubTopo = self.volume.addChild('modelSubTopo')

            modelSubTopo.addObject('TriangleSetTopologyContainer', position='@../membraneROISubTopo.pointsInROI',
                                      triangles='@../membraneROISubTopo.trianglesInROI', name='container')
            modelSubTopo.addObject('TriangleFEMForceField', template='Vec3d', name='FEM', method='large',
                                    poissonRatio='0.49', youngModulus=float(self.youngModulus)*100*5/7)

    def action(self, act):
        # For now the action will be a 3d matrix, same dim as disign
        for ijk in np.ndindex(self.design.shape):
            # if this section is marked as a cavity, create one with the correct index
            if self.design[ijk] == 0:
                i, j, k = ijk
                #print('ijk', ijk)
                with self.rootNode[f"volume.cavity_{i}_{j}_{k}.SurfacePressureConstraint.value"].writeableArray() as wa:
                    #print("HERE", wa, act, wa[0], act[ijk])
                    wa[0] = act[ijk]
                    del wa

    def observation(self):
        return self.rootNode.volume.dofs.position.value


def createScene(rootNode):
    '''createScene(rootNode) this is so this works with runSofa'''

    print("Example behavior using runSofa animation stepper function")


    # this is the Sofa animation function we pass it our animation function
    # and along with the exit function.
    cnt = 0
    ac = list(np.linspace(0,7,71))*10
    ac.sort()
    print(ac)
    obs_s = []

    def my_animation(target, scn, factor):
        # this animation makes the two cavities oscillate at different
        # frequencies
        action = np.array([[[3*np.sin(factor*np.pi*2),
                               3*np.sin(3*factor*np.pi*2)]]])
        action = np.ones(scn.design.shape)*factor*6
        #action = np.ones(scn.design.shape) * float(factor)
        a = scn.observation()[82]


        '''
        if scn.cnt < len(ac):


            obs_s.append(np.array(a))
            action = action - action + ac[scn.cnt]
            scn.cnt += 1

        else:
            print(obs_s)
            np.save('obs.npy', np.array(obs_s))
            action = action - action

        '''
        scn.action(action)


        #print("State: ", np.linalg.norm(a)-2.0, " action: ", action, ' obs ', obs_s[-1] )

    def ExitFunc(target, scn, factor):

        print("Done with animation")
        exit()

    example = "quadruped"
    #example = "one cell"
    if example == "two cell":
        # it is 1x1x2 with a cavity in both positions
        design = np.array([[[0, 0]]])
        # this is where the example mesh is stored in the docker file.
        meshpath = '/home/sofauser/workdir/simple_control_policy/mesh/'
        scn = SceneDefinition(rootNode, design=design, meshFolder=meshpath, with_gui=True)

    elif example == "one cell":
        design = np.array([[[0]]])
        meshpath = '/home/sofauser/workdir/simple_control_policy/one_cell_robot_mesh/'
        scn = SceneDefinition(rootNode, design=design, meshFolder=meshpath, with_gui=True)

    elif example == "quadruped":
        design = np.array([[[0, 0, 0, 0, 0]]]) # four legs plus the central cavity
        meshpath = '/home/sofauser/workdir/simple_control_policy/quadruped/'
        scn = SceneDefinition(rootNode, design=design, meshFolder=meshpath, with_gui=True,
                              collision=True, poissonRatio='0.05', totalMass=0.0035, youngModulus='70', constraint="floor")

    # these two lines hook the animation function defined above to the scene graph
    # and makes it so it is run at every time step.
    #AnimationManager(rootNode)
    scn.cnt = 0
    scn.design = design

    #addAnimation(my_animation, {"target": rootNode, "scn":scn}, duration=2.2, mode="once", onDone=ExitFunc)
    #my_animation(rootNode, scn, 11.0)
    return rootNode
